// COMSOL Multiphysics 5.2.1.152 model "example1-405nm.mph"
// Outline of the model tree

Parameters
  lam0 = 0.405[um]
  R0 = 5[um]
  Htape = 20[um]
  Wtape = 200[um]
  ntape = 1.47
  nsphere = 1.6

Geometry
  geom1 "Geometry 1" (2D, length unit µm)
    r1: Rectangle | pos = {0, -Htape/2}; base = center; size = {Wtape, Htape}
    c1: Circle | r = R0
    pol1: Polygon | source = table; table = {{-Wtape, -Htape-0.1[um]}, {Wtape, -Htape-0.1[um]}}
    fin: Finalize "Form Union"
  pgeom_gop "Geometry" (1D, length unit m)
    pt1: Point

Materials
  mat1: Common "Material 1" on domains 1
    RefractiveIndex
      n = ntape
      ki = 0
  mat2: Common "Material 2" on domains 2, 3
    RefractiveIndex
      n = nsphere
      ki = 0

Physics
  gop: GeometricalOptics on all domains
    dependent variable q = {qx, qy, qz}
    StoreRayStatusData.StoreRayStatusData = 1
    IntensityComputation.IntensityComputation = ComputeIntensityAndPower
    ComputeOpticalPathLength.ComputeOpticalPathLength = 1
    ComputePhase.ComputePhase = 1
    MaximumSecondary.MaximumSecondary = 0
    mp1: MediumProperties (default)
    matd1: MaterialDiscontinuity (default)
    op1: RayProperties | lambda0 = lam0
    wall1: Wall on boundaries 1
    relg1: ReleaseGrid "Release from Grid 1"
      x0 = {range(-R0,R0/10000,-2*R0/3), -10[um]}
      L0 = {0, 1, 0}
      InitialPolarizationType = UnPolarized
    wall2: Wall on boundaries 2, 7 | WallCondition = Disappear

Mesh
  mesh1 "Mesh 1"
    size: MeshSizeDefault | hauto = 1
    size1: Size on domains 3 | hmax = 0.05; hauto = 5; custom = on
    ftri1: FreeTri "Free Triangular 1" on remaining entities

Studies
  std1 "Study 1"
    rtrac: RayTracing | timestepspec = specifylength; tlist = range(0,0.01,1); lunit = mm; llist = range(0,0.01,10)

Solver configurations
  sol1 "Solution 1" (study std1)
    v1: Variables "Dependent Variables 1"
    t1: Time "Time-Dependent Solver 1"
      tlist = 0.0 3.33564095198e-14 6.67128190396e-14 1.00069228559e-13 1.33425638079e-13 1.66782047599e-13 2.00138457119e-13 2.33494866639e-13 2.66851276159e-13 3.00207685678e-13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
      rtol = 1.0E-5
      atolglobalmethod = scaled
      atolglobal = 1.0E-6
      timemethod = genalpha
      estrat = exclude
      tstepsgenalpha = strict
      tout = tsteps
      fc1: FullyCoupled | linsolver = i1; jtech = once
      i1: Iterative | linsolver = gmres
        ja1: Jacobi

Datasets
  dset1: Solution | solution = sol1
  ray1: Ray
    solution = sol1
    rgeomspec = fromphysics
    rgeom = pgeom_gop
    posdof = {comp1.qx, comp1.qy}
    physicsinterface = gop

Plots
  pg1: PlotGroup2D "Ray Trajectories (gop)" | data = ray1
    rtrj1: RayTrajectories | linetype = line; pointtype = point
      col1: Color "Color Expression 1" | expr = gop.I
      filt1: RayTrajectoriesFilter "Filter 1"

Exports
  data1: Data
    data = ray1
    expr = {qx, qy, kx, ky, gop.I, gop.r1, gop.Psi, gop.L}
    unit = {µm, µm, rad/m, rad/m, W/m^2, µm, rad, µm}
    descr = {"Ray position, x component", "Ray position, y component", "Wave vector, x component", "Wave vector, y component", Intensity, Radius of curvature 1, Ray phase, Optical path length}
    filename = D:\COMSOL_work\Micro_sphere\wl405nm.txt